// SBML level 2 version 1

model egfr_simple()

  // Compartments:
  compartment cell = 1;

  // Species:
  species EGF_R in cell; EGF_R is "EGF(R)";
  species EGFR_CR1_L_Y1068_U in cell; EGFR_CR1_L_Y1068_U is "EGFR(CR1,L,Y1068~U)";
  species Grb2_SH2_SH3 in cell; Grb2_SH2_SH3 is "Grb2(SH2,SH3)";
  species Sos1_PxxP in cell; Sos1_PxxP is "Sos1(PxxP)";
  species EGF_R_1_EGFR_CR1_L_1_Y1068_U in cell = 0; EGF_R_1_EGFR_CR1_L_1_Y1068_U is "EGF(R!1).EGFR(CR1,L!1,Y1068~U)";
  species Grb2_SH2_SH3_1_Sos1_PxxP_1 in cell = 0; Grb2_SH2_SH3_1_Sos1_PxxP_1 is "Grb2(SH2,SH3!1).Sos1(PxxP!1)";
  species S7 in cell = 0; S7 is "EGF(R!1).EGF(R!2).EGFR(CR1!3,L!1,Y1068~U).EGFR(CR1!3,L!2,Y1068~U)";
  species S8 in cell = 0; S8 is "EGF(R!1).EGF(R!2).EGFR(CR1!3,L!1,Y1068~P).EGFR(CR1!3,L!2,Y1068~U)";
  species Trash in cell = 0; Trash is "Trash()";
  species EGF_R_1_EGFR_CR1_L_1_Y1068_P in cell = 0; EGF_R_1_EGFR_CR1_L_1_Y1068_P is "EGF(R!1).EGFR(CR1,L!1,Y1068~P)";
  species S11 in cell = 0; S11 is "EGF(R!1).EGF(R!2).EGFR(CR1!3,L!1,Y1068~P).EGFR(CR1!3,L!2,Y1068~P)";
  species S12 in cell = 0; S12 is "EGF(R!1).EGF(R!2).EGFR(CR1!3,L!1,Y1068~P!4).EGFR(CR1!3,L!2,Y1068~U).Grb2(SH2!4,SH3)";
  species S13 in cell = 0; S13 is "EGF(R!1).EGF(R!2).EGFR(CR1!3,L!1,Y1068~P!4).EGFR(CR1!3,L!2,Y1068~U).Grb2(SH2!4,SH3!5).Sos1(PxxP!5)";
  species EGFR_CR1_L_Y1068_P in cell = 0; EGFR_CR1_L_Y1068_P is "EGFR(CR1,L,Y1068~P)";
  species S15 in cell = 0; S15 is "EGF(R!1).EGFR(CR1,L!1,Y1068~P!2).Grb2(SH2!2,SH3)";
  species S16 in cell = 0; S16 is "EGF(R!1).EGFR(CR1,L!1,Y1068~P!2).Grb2(SH2!2,SH3!3).Sos1(PxxP!3)";
  species S17 in cell = 0; S17 is "EGF(R!1).EGF(R!2).EGFR(CR1!3,L!1,Y1068~P!4).EGFR(CR1!3,L!2,Y1068~P).Grb2(SH2!4,SH3)";
  species S18 in cell = 0; S18 is "EGF(R!1).EGF(R!2).EGFR(CR1!3,L!1,Y1068~P!4).EGFR(CR1!3,L!2,Y1068~P).Grb2(SH2!4,SH3!5).Sos1(PxxP!5)";
  species S19 in cell = 0; S19 is "EGFR(CR1,L,Y1068~P!1).Grb2(SH2!1,SH3)";
  species S20 in cell = 0; S20 is "EGFR(CR1,L,Y1068~P!1).Grb2(SH2!1,SH3!2).Sos1(PxxP!2)";
  species S21 in cell = 0; S21 is "EGF(R!1).EGF(R!2).EGFR(CR1!3,L!1,Y1068~P!4).EGFR(CR1!3,L!2,Y1068~P!5).Grb2(SH2!4,SH3).Grb2(SH2!5,SH3)";
  species S22 in cell = 0; S22 is "EGF(R!1).EGF(R!2).EGFR(CR1!3,L!1,Y1068~P!4).EGFR(CR1!3,L!2,Y1068~P!5).Grb2(SH2!5,SH3!6).Grb2(SH2!4,SH3).Sos1(PxxP!6)";
  species S23 in cell = 0; S23 is "EGF(R!1).EGF(R!2).EGFR(CR1!3,L!1,Y1068~P!4).EGFR(CR1!3,L!2,Y1068~P!5).Grb2(SH2!4,SH3!6).Grb2(SH2!5,SH3!7).Sos1(PxxP!6).Sos1(PxxP!7)";

  // Parameters:
  NA = 6.02e23;
  f = 1;
  km1 = 0.06;
  km2 = 0.1;
  kp3 = 0.5;
  km3 = 4.505;
  km4 = 0.05;
  km5 = 0.06;
  deg = 0.01;

  // Assignment rules:
  Vo := f*1e-10;
  V := f*3e-12;
  EGF_init := 20*1e-9*NA*Vo;
  EGFR_init := f*1.8e5;
  Grb2_init := f*1.5e5;
  Sos1_init := f*6.2e4;
  kp1 := 9e7/(NA*Vo);
  kp2 := 1e7/(NA*V);
  kp4 := 1.5e6/(NA*V);
  kp5 := 1e7/(NA*V);
  Group_EGFR_tot := EGFR_CR1_L_Y1068_U + EGF_R_1_EGFR_CR1_L_1_Y1068_U + 2*S7 + 2*S8 + EGF_R_1_EGFR_CR1_L_1_Y1068_P + 2*S11 + 2*S12 + 2*S13 + EGFR_CR1_L_Y1068_P + S15 + S16 + 2*S17 + 2*S18 + S19 + S20 + 2*S21 + 2*S22 + 2*S23;
  Group_Lig_free := 0 + EGF_R;
  Group_Dim := S7 + S8 + S11 + S12 + S13 + S17 + S18 + S21 + S22 + S23;
  Group_RP := S8 + EGF_R_1_EGFR_CR1_L_1_Y1068_P + 2*S11 + S12 + S13 + EGFR_CR1_L_Y1068_P + S15 + S16 + 2*S17 + 2*S18 + S19 + S20 + 2*S21 + 2*S22 + 2*S23;
  Group_Grb2Sos1 := 0 + Grb2_SH2_SH3_1_Sos1_PxxP_1;
  Group_Sos1_act := S13 + S16 + S18 + S20 + S22 + 2*S23;

  // Reactions:
  R1: EGF_R + EGFR_CR1_L_Y1068_U => EGF_R_1_EGFR_CR1_L_1_Y1068_U; kp1*EGF_R*EGFR_CR1_L_Y1068_U;
  R2: Grb2_SH2_SH3 + Sos1_PxxP => Grb2_SH2_SH3_1_Sos1_PxxP_1; kp5*Grb2_SH2_SH3*Sos1_PxxP;
  R3: EGF_R_1_EGFR_CR1_L_1_Y1068_U => EGF_R + EGFR_CR1_L_Y1068_U; km1*EGF_R_1_EGFR_CR1_L_1_Y1068_U;
  R4: EGF_R_1_EGFR_CR1_L_1_Y1068_U + EGF_R_1_EGFR_CR1_L_1_Y1068_U => S7; 0.5*kp2*EGF_R_1_EGFR_CR1_L_1_Y1068_U*EGF_R_1_EGFR_CR1_L_1_Y1068_U;
  R5: Grb2_SH2_SH3_1_Sos1_PxxP_1 => Grb2_SH2_SH3 + Sos1_PxxP; km5*Grb2_SH2_SH3_1_Sos1_PxxP_1;
  R6: S7 => EGF_R_1_EGFR_CR1_L_1_Y1068_U + EGF_R_1_EGFR_CR1_L_1_Y1068_U; km2*S7;
  R7: S7 => S8; 2*kp3*S7;
  R8: S7 => Trash; deg*S7;
  R9: S8 => EGF_R_1_EGFR_CR1_L_1_Y1068_U + EGF_R_1_EGFR_CR1_L_1_Y1068_P; km2*S8;
  R10: S8 => S11; kp3*S8;
  R11: S8 => S7; km3*S8;
  R12: Grb2_SH2_SH3 + S8 => S12; kp4*Grb2_SH2_SH3*S8;
  R13: Grb2_SH2_SH3_1_Sos1_PxxP_1 + S8 => S13; kp4*Grb2_SH2_SH3_1_Sos1_PxxP_1*S8;
  R14: S8 => Trash; deg*S8;
  R15: EGF_R_1_EGFR_CR1_L_1_Y1068_P => EGF_R + EGFR_CR1_L_Y1068_P; km1*EGF_R_1_EGFR_CR1_L_1_Y1068_P;
  R16: EGF_R_1_EGFR_CR1_L_1_Y1068_U + EGF_R_1_EGFR_CR1_L_1_Y1068_P => S8; kp2*EGF_R_1_EGFR_CR1_L_1_Y1068_U*EGF_R_1_EGFR_CR1_L_1_Y1068_P;
  R17: EGF_R_1_EGFR_CR1_L_1_Y1068_P + EGF_R_1_EGFR_CR1_L_1_Y1068_P => S11; 0.5*kp2*EGF_R_1_EGFR_CR1_L_1_Y1068_P*EGF_R_1_EGFR_CR1_L_1_Y1068_P;
  R18: S11 => EGF_R_1_EGFR_CR1_L_1_Y1068_P + EGF_R_1_EGFR_CR1_L_1_Y1068_P; km2*S11;
  R19: S12 => EGF_R_1_EGFR_CR1_L_1_Y1068_U + S15; km2*S12;
  R20: S13 => EGF_R_1_EGFR_CR1_L_1_Y1068_U + S16; km2*S13;
  R21: S12 => S17; kp3*S12;
  R22: S13 => S18; kp3*S13;
  R23: EGF_R_1_EGFR_CR1_L_1_Y1068_P => EGF_R_1_EGFR_CR1_L_1_Y1068_U; km3*EGF_R_1_EGFR_CR1_L_1_Y1068_P;
  R24: S11 => S8; 2*km3*S11;
  R25: Grb2_SH2_SH3 + EGF_R_1_EGFR_CR1_L_1_Y1068_P => S15; kp4*Grb2_SH2_SH3*EGF_R_1_EGFR_CR1_L_1_Y1068_P;
  R26: Grb2_SH2_SH3_1_Sos1_PxxP_1 + EGF_R_1_EGFR_CR1_L_1_Y1068_P => S16; kp4*Grb2_SH2_SH3_1_Sos1_PxxP_1*EGF_R_1_EGFR_CR1_L_1_Y1068_P;
  R27: Grb2_SH2_SH3 + S11 => S17; 2*kp4*Grb2_SH2_SH3*S11;
  R28: Grb2_SH2_SH3_1_Sos1_PxxP_1 + S11 => S18; 2*kp4*Grb2_SH2_SH3_1_Sos1_PxxP_1*S11;
  R29: S12 => Grb2_SH2_SH3 + S8; km4*S12;
  R30: S13 => Grb2_SH2_SH3_1_Sos1_PxxP_1 + S8; km4*S13;
  R31: Sos1_PxxP + S12 => S13; kp5*Sos1_PxxP*S12;
  R32: S13 => Sos1_PxxP + S12; km5*S13;
  R33: S11 => Trash; deg*S11;
  R34: S12 => Grb2_SH2_SH3 + Trash; deg*S12;
  R35: S13 => Grb2_SH2_SH3_1_Sos1_PxxP_1 + Trash; deg*S13;
  R36: EGF_R + EGFR_CR1_L_Y1068_P => EGF_R_1_EGFR_CR1_L_1_Y1068_P; kp1*EGF_R*EGFR_CR1_L_Y1068_P;
  R37: S15 => EGF_R + S19; km1*S15;
  R38: S16 => EGF_R + S20; km1*S16;
  R39: EGF_R_1_EGFR_CR1_L_1_Y1068_U + S15 => S12; kp2*EGF_R_1_EGFR_CR1_L_1_Y1068_U*S15;
  R40: EGF_R_1_EGFR_CR1_L_1_Y1068_U + S16 => S13; kp2*EGF_R_1_EGFR_CR1_L_1_Y1068_U*S16;
  R41: EGF_R_1_EGFR_CR1_L_1_Y1068_P + S15 => S17; kp2*EGF_R_1_EGFR_CR1_L_1_Y1068_P*S15;
  R42: EGF_R_1_EGFR_CR1_L_1_Y1068_P + S16 => S18; kp2*EGF_R_1_EGFR_CR1_L_1_Y1068_P*S16;
  R43: S15 + S15 => S21; 0.5*kp2*S15*S15;
  R44: S15 + S16 => S22; kp2*S15*S16;
  R45: S16 + S16 => S23; 0.5*kp2*S16*S16;
  R46: S17 => EGF_R_1_EGFR_CR1_L_1_Y1068_P + S15; km2*S17;
  R47: S18 => EGF_R_1_EGFR_CR1_L_1_Y1068_P + S16; km2*S18;
  R48: EGFR_CR1_L_Y1068_P => EGFR_CR1_L_Y1068_U; km3*EGFR_CR1_L_Y1068_P;
  R49: S17 => S12; km3*S17;
  R50: S18 => S13; km3*S18;
  R51: Grb2_SH2_SH3 + EGFR_CR1_L_Y1068_P => S19; kp4*Grb2_SH2_SH3*EGFR_CR1_L_Y1068_P;
  R52: Grb2_SH2_SH3_1_Sos1_PxxP_1 + EGFR_CR1_L_Y1068_P => S20; kp4*Grb2_SH2_SH3_1_Sos1_PxxP_1*EGFR_CR1_L_Y1068_P;
  R53: Grb2_SH2_SH3 + S17 => S21; kp4*Grb2_SH2_SH3*S17;
  R54: Grb2_SH2_SH3_1_Sos1_PxxP_1 + S17 => S22; kp4*Grb2_SH2_SH3_1_Sos1_PxxP_1*S17;
  R55: Grb2_SH2_SH3 + S18 => S22; kp4*Grb2_SH2_SH3*S18;
  R56: Grb2_SH2_SH3_1_Sos1_PxxP_1 + S18 => S23; kp4*Grb2_SH2_SH3_1_Sos1_PxxP_1*S18;
  R57: S15 => Grb2_SH2_SH3 + EGF_R_1_EGFR_CR1_L_1_Y1068_P; km4*S15;
  R58: S16 => Grb2_SH2_SH3_1_Sos1_PxxP_1 + EGF_R_1_EGFR_CR1_L_1_Y1068_P; km4*S16;
  R59: S17 => Grb2_SH2_SH3 + S11; km4*S17;
  R60: S18 => Grb2_SH2_SH3_1_Sos1_PxxP_1 + S11; km4*S18;
  R61: Sos1_PxxP + S15 => S16; kp5*Sos1_PxxP*S15;
  R62: Sos1_PxxP + S17 => S18; kp5*Sos1_PxxP*S17;
  R63: S16 => Sos1_PxxP + S15; km5*S16;
  R64: S18 => Sos1_PxxP + S17; km5*S18;
  R65: S17 => Grb2_SH2_SH3 + Trash; deg*S17;
  R66: S18 => Grb2_SH2_SH3_1_Sos1_PxxP_1 + Trash; deg*S18;
  R67: EGF_R + S19 => S15; kp1*EGF_R*S19;
  R68: EGF_R + S20 => S16; kp1*EGF_R*S20;
  R69: S21 => S15 + S15; km2*S21;
  R70: S22 => S15 + S16; km2*S22;
  R71: S23 => S16 + S16; km2*S23;
  R72: S19 => Grb2_SH2_SH3 + EGFR_CR1_L_Y1068_P; km4*S19;
  R73: S20 => Grb2_SH2_SH3_1_Sos1_PxxP_1 + EGFR_CR1_L_Y1068_P; km4*S20;
  R74: S21 => Grb2_SH2_SH3 + S17; 2*km4*S21;
  R75: S22 => Grb2_SH2_SH3 + S18; km4*S22;
  R76: S22 => Grb2_SH2_SH3_1_Sos1_PxxP_1 + S17; km4*S22;
  R77: S23 => Grb2_SH2_SH3_1_Sos1_PxxP_1 + S18; 2*km4*S23;
  R78: Sos1_PxxP + S19 => S20; kp5*Sos1_PxxP*S19;
  R79: Sos1_PxxP + S21 => S22; 2*kp5*Sos1_PxxP*S21;
  R80: Sos1_PxxP + S22 => S23; kp5*Sos1_PxxP*S22;
  R81: S20 => Sos1_PxxP + S19; km5*S20;
  R82: S22 => Sos1_PxxP + S21; km5*S22;
  R83: S23 => Sos1_PxxP + S22; 2*km5*S23;
  R84: S21 => Grb2_SH2_SH3 + Grb2_SH2_SH3 + Trash; deg*S21;
  R85: S22 => Grb2_SH2_SH3 + Grb2_SH2_SH3_1_Sos1_PxxP_1 + Trash; deg*S22;
  R86: S23 => Grb2_SH2_SH3_1_Sos1_PxxP_1 + Grb2_SH2_SH3_1_Sos1_PxxP_1 + Trash; deg*S23;
end
