// SBML level 2 version 1

model simple()

  // Compartments:
  compartment cell = 1;

  // Species:
  species EGF_R in cell; EGF_R is "EGF(R)";
  species EGFR_CR1_L_Y1068_U in cell; EGFR_CR1_L_Y1068_U is "EGFR(CR1,L,Y1068~U)";
  species EGF_R_1_EGFR_CR1_L_1_Y1068_U in cell = 0; EGF_R_1_EGFR_CR1_L_1_Y1068_U is "EGF(R!1).EGFR(CR1,L!1,Y1068~U)";

  // Parameters:
  NA = 6e23;
  f = 0.01;
  EGF_conc = 2e-9;
  km1 = 0.06;

  // Assignment rules:
  Vo := f*1e-10;
  V := f*3e-12;
  EGF0 := EGF_conc*NA*Vo;
  EGFR0 := f*1.8e5;
  kp1 := 9e7/(NA*Vo);
  Group_Lbound := 0 + EGF_R_1_EGFR_CR1_L_1_Y1068_U;

  // Reactions:
  R1: EGF_R + EGFR_CR1_L_Y1068_U => EGF_R_1_EGFR_CR1_L_1_Y1068_U; kp1*EGF_R*EGFR_CR1_L_Y1068_U;
  R2: EGF_R_1_EGFR_CR1_L_1_Y1068_U => EGF_R + EGFR_CR1_L_Y1068_U; km1*EGF_R_1_EGFR_CR1_L_1_Y1068_U;
end
