// SBML level 2 version 4

model egfr_simple()

  // Compartments:
  compartment comp0 = 1;

  // Species:
  species EGF in comp0 = 1204000; EGF is "p:EGF(R)";
  species EGFR in comp0 = 180000; EGFR is "p:EGFR(CR1,L,Y1068~U)";
  species Grb2 in comp0 = 150000; Grb2 is "p:Grb2(SH2,SH3)";
  species Sos1 in comp0 = 62000; Sos1 is "p:Sos1(PxxP)";
  species p_EGF_R_1_p_EGFR_CR1_L_1_Y1068_U in comp0 = 0; p_EGF_R_1_p_EGFR_CR1_L_1_Y1068_U is "p:EGF(R!1).p:EGFR(CR1,L!1,Y1068~U)";
  species p_Grb2_SH2_SH3_1_p_Sos1_PxxP_1 in comp0 = 0; p_Grb2_SH2_SH3_1_p_Sos1_PxxP_1 is "p:Grb2(SH2,SH3!1).p:Sos1(PxxP!1)";
  species s7 in comp0 = 0; s7 is "p:EGF(R!1).p:EGF(R!2).p:EGFR(CR1!3,L!1,Y1068~U).p:EGFR(CR1!3,L!2,Y1068~U)";
  species s8 in comp0 = 0; s8 is "p:EGF(R!1).p:EGF(R!2).p:EGFR(CR1!3,L!1,Y1068~P).p:EGFR(CR1!3,L!2,Y1068~U)";
  species p_EGF_R_1_p_EGFR_CR1_L_1_Y1068_P in comp0 = 0; p_EGF_R_1_p_EGFR_CR1_L_1_Y1068_P is "p:EGF(R!1).p:EGFR(CR1,L!1,Y1068~P)";
  species s10 in comp0 = 0; s10 is "p:EGF(R!1).p:EGF(R!2).p:EGFR(CR1!3,L!1,Y1068~P).p:EGFR(CR1!3,L!2,Y1068~P)";
  species s11 in comp0 = 0; s11 is "p:EGF(R!1).p:EGF(R!2).p:EGFR(CR1!3,L!1,Y1068!4~P).p:EGFR(CR1!3,L!2,Y1068~U).p:Grb2(SH2!4,SH3)";
  species s12 in comp0 = 0; s12 is "p:EGF(R!1).p:EGF(R!2).p:EGFR(CR1!3,L!1,Y1068!4~P).p:EGFR(CR1!3,L!2,Y1068~U).p:Grb2(SH2!4,SH3!5).p:Sos1(PxxP!5)";
  species p_EGFR_CR1_L_Y1068_P in comp0 = 0; p_EGFR_CR1_L_Y1068_P is "p:EGFR(CR1,L,Y1068~P)";
  species s14 in comp0 = 0; s14 is "p:EGF(R!1).p:EGFR(CR1,L!1,Y1068!2~P).p:Grb2(SH2!2,SH3)";
  species s15 in comp0 = 0; s15 is "p:EGF(R!1).p:EGFR(CR1,L!1,Y1068!2~P).p:Grb2(SH2!2,SH3!3).p:Sos1(PxxP!3)";
  species s16 in comp0 = 0; s16 is "p:EGF(R!1).p:EGF(R!2).p:EGFR(CR1!3,L!1,Y1068!4~P).p:EGFR(CR1!3,L!2,Y1068~P).p:Grb2(SH2!4,SH3)";
  species s17 in comp0 = 0; s17 is "p:EGF(R!1).p:EGF(R!2).p:EGFR(CR1!3,L!1,Y1068!4~P).p:EGFR(CR1!3,L!2,Y1068~P).p:Grb2(SH2!4,SH3!5).p:Sos1(PxxP!5)";
  species s18 in comp0 = 0; s18 is "p:EGFR(CR1,L,Y1068!1~P).p:Grb2(SH2!1,SH3)";
  species s19 in comp0 = 0; s19 is "p:EGFR(CR1,L,Y1068!1~P).p:Grb2(SH2!1,SH3!2).p:Sos1(PxxP!2)";
  species s20 in comp0 = 0; s20 is "p:EGF(R!1).p:EGF(R!2).p:EGFR(CR1!3,L!1,Y1068!4~P).p:EGFR(CR1!3,L!2,Y1068!5~P).p:Grb2(SH2!4,SH3).p:Grb2(SH2!5,SH3)";
  species s21 in comp0 = 0; s21 is "p:EGF(R!1).p:EGF(R!2).p:EGFR(CR1!3,L!1,Y1068!4~P).p:EGFR(CR1!3,L!2,Y1068!5~P).p:Grb2(SH2!4,SH3!6).p:Grb2(SH2!5,SH3).p:Sos1(PxxP!6)";
  species s22 in comp0 = 0; s22 is "p:EGF(R!1).p:EGF(R!2).p:EGFR(CR1!3,L!1,Y1068!4~P).p:EGFR(CR1!3,L!2,Y1068!5~P).p:Grb2(SH2!4,SH3!6).p:Grb2(SH2!5,SH3!7).p:Sos1(PxxP!6).p:Sos1(PxxP!7)";

  // Parameters:
  NA = 6.02e23;
  f = 1;
  rule1_k = 1.495017e-6;
  rule9_k = 5.537099e-6;
  rule2_k = 0.06;
  rule3_k = 5.537099e-6;
  rule10_k = 0.06;
  rule4_k = 0.1;
  rule5_k = 0.5;
  rule11_k = 0.01;
  rule6_k = 4.505;
  rule7_k = 8.305648e-7;
  rule8_k = 0.05;

  // Assignment rules:
  Vo := f*1e-10;
  V := f*3e-12;
  EGF_init := 20e-9*NA*Vo;
  EGFR_init := f*1.8e5;
  Grb2_init := f*1.5e5;
  Sos1_init := f*6.2e4;
  time_ := time;

  // Reactions:
  r1: EGFR + EGF => p_EGF_R_1_p_EGFR_CR1_L_1_Y1068_U; rule1_k*EGFR*EGF*comp0;
  r2: Grb2 + Sos1 => p_Grb2_SH2_SH3_1_p_Sos1_PxxP_1; rule9_k*Grb2*Sos1*comp0;
  r3: p_EGF_R_1_p_EGFR_CR1_L_1_Y1068_U => EGF + EGFR; rule2_k*p_EGF_R_1_p_EGFR_CR1_L_1_Y1068_U*comp0;
  r4: p_EGF_R_1_p_EGFR_CR1_L_1_Y1068_U + p_EGF_R_1_p_EGFR_CR1_L_1_Y1068_U => s7; 0.5*rule3_k*p_EGF_R_1_p_EGFR_CR1_L_1_Y1068_U*p_EGF_R_1_p_EGFR_CR1_L_1_Y1068_U*comp0;
  r5: p_Grb2_SH2_SH3_1_p_Sos1_PxxP_1 => Grb2 + Sos1; rule10_k*p_Grb2_SH2_SH3_1_p_Sos1_PxxP_1*comp0;
  r6: s7 => p_EGF_R_1_p_EGFR_CR1_L_1_Y1068_U + p_EGF_R_1_p_EGFR_CR1_L_1_Y1068_U; rule4_k*s7*comp0;
  r7: s7 => s8; 2*rule5_k*s7*comp0;
  r8: s7 => ; rule11_k*s7*comp0;
  r9: s8 => p_EGF_R_1_p_EGFR_CR1_L_1_Y1068_U + p_EGF_R_1_p_EGFR_CR1_L_1_Y1068_P; rule4_k*s8*comp0;
  r10: s8 => s10; rule5_k*s8*comp0;
  r11: s8 => s7; rule6_k*s8*comp0;
  r12: s8 + Grb2 => s11; rule7_k*s8*Grb2*comp0;
  r13: s8 + p_Grb2_SH2_SH3_1_p_Sos1_PxxP_1 => s12; rule7_k*s8*p_Grb2_SH2_SH3_1_p_Sos1_PxxP_1*comp0;
  r14: s8 => ; rule11_k*s8*comp0;
  r15: p_EGF_R_1_p_EGFR_CR1_L_1_Y1068_P => EGF + p_EGFR_CR1_L_Y1068_P; rule2_k*p_EGF_R_1_p_EGFR_CR1_L_1_Y1068_P*comp0;
  r16: p_EGF_R_1_p_EGFR_CR1_L_1_Y1068_U + p_EGF_R_1_p_EGFR_CR1_L_1_Y1068_P => s8; rule3_k*p_EGF_R_1_p_EGFR_CR1_L_1_Y1068_U*p_EGF_R_1_p_EGFR_CR1_L_1_Y1068_P*comp0;
  r17: p_EGF_R_1_p_EGFR_CR1_L_1_Y1068_P + p_EGF_R_1_p_EGFR_CR1_L_1_Y1068_P => s10; 0.5*rule3_k*p_EGF_R_1_p_EGFR_CR1_L_1_Y1068_P*p_EGF_R_1_p_EGFR_CR1_L_1_Y1068_P*comp0;
  r18: p_EGF_R_1_p_EGFR_CR1_L_1_Y1068_P => p_EGF_R_1_p_EGFR_CR1_L_1_Y1068_U; rule6_k*p_EGF_R_1_p_EGFR_CR1_L_1_Y1068_P*comp0;
  r19: p_EGF_R_1_p_EGFR_CR1_L_1_Y1068_P + Grb2 => s14; rule7_k*p_EGF_R_1_p_EGFR_CR1_L_1_Y1068_P*Grb2*comp0;
  r20: p_EGF_R_1_p_EGFR_CR1_L_1_Y1068_P + p_Grb2_SH2_SH3_1_p_Sos1_PxxP_1 => s15; rule7_k*p_EGF_R_1_p_EGFR_CR1_L_1_Y1068_P*p_Grb2_SH2_SH3_1_p_Sos1_PxxP_1*comp0;
  r21: s10 => p_EGF_R_1_p_EGFR_CR1_L_1_Y1068_P + p_EGF_R_1_p_EGFR_CR1_L_1_Y1068_P; rule4_k*s10*comp0;
  r22: s10 => s8; 2*rule6_k*s10*comp0;
  r23: s10 + Grb2 => s16; 2*rule7_k*s10*Grb2*comp0;
  r24: s10 + p_Grb2_SH2_SH3_1_p_Sos1_PxxP_1 => s17; 2*rule7_k*s10*p_Grb2_SH2_SH3_1_p_Sos1_PxxP_1*comp0;
  r25: s10 => ; rule11_k*s10*comp0;
  r26: s11 => s14 + p_EGF_R_1_p_EGFR_CR1_L_1_Y1068_U; rule4_k*s11*comp0;
  r27: s11 => s16; rule5_k*s11*comp0;
  r28: s11 => Grb2 + s8; rule8_k*s11*comp0;
  r29: s11 + Sos1 => s12; rule9_k*s11*Sos1*comp0;
  r30: s11 => Grb2; rule11_k*s11*comp0;
  r31: s12 => s15 + p_EGF_R_1_p_EGFR_CR1_L_1_Y1068_U; rule4_k*s12*comp0;
  r32: s12 => s17; rule5_k*s12*comp0;
  r33: s12 => p_Grb2_SH2_SH3_1_p_Sos1_PxxP_1 + s8; rule8_k*s12*comp0;
  r34: s12 => Sos1 + s11; rule10_k*s12*comp0;
  r35: s12 => p_Grb2_SH2_SH3_1_p_Sos1_PxxP_1; rule11_k*s12*comp0;
  r36: p_EGFR_CR1_L_Y1068_P + EGF => p_EGF_R_1_p_EGFR_CR1_L_1_Y1068_P; rule1_k*p_EGFR_CR1_L_Y1068_P*EGF*comp0;
  r37: p_EGFR_CR1_L_Y1068_P => EGFR; rule6_k*p_EGFR_CR1_L_Y1068_P*comp0;
  r38: p_EGFR_CR1_L_Y1068_P + Grb2 => s18; rule7_k*p_EGFR_CR1_L_Y1068_P*Grb2*comp0;
  r39: p_EGFR_CR1_L_Y1068_P + p_Grb2_SH2_SH3_1_p_Sos1_PxxP_1 => s19; rule7_k*p_EGFR_CR1_L_Y1068_P*p_Grb2_SH2_SH3_1_p_Sos1_PxxP_1*comp0;
  r40: s14 => EGF + s18; rule2_k*s14*comp0;
  r41: p_EGF_R_1_p_EGFR_CR1_L_1_Y1068_U + s14 => s11; rule3_k*p_EGF_R_1_p_EGFR_CR1_L_1_Y1068_U*s14*comp0;
  r42: p_EGF_R_1_p_EGFR_CR1_L_1_Y1068_P + s14 => s16; rule3_k*p_EGF_R_1_p_EGFR_CR1_L_1_Y1068_P*s14*comp0;
  r43: s14 + s14 => s20; 0.5*rule3_k*s14*s14*comp0;
  r44: s14 => Grb2 + p_EGF_R_1_p_EGFR_CR1_L_1_Y1068_P; rule8_k*s14*comp0;
  r45: s14 + Sos1 => s15; rule9_k*s14*Sos1*comp0;
  r46: s15 => EGF + s19; rule2_k*s15*comp0;
  r47: p_EGF_R_1_p_EGFR_CR1_L_1_Y1068_U + s15 => s12; rule3_k*p_EGF_R_1_p_EGFR_CR1_L_1_Y1068_U*s15*comp0;
  r48: p_EGF_R_1_p_EGFR_CR1_L_1_Y1068_P + s15 => s17; rule3_k*p_EGF_R_1_p_EGFR_CR1_L_1_Y1068_P*s15*comp0;
  r49: s14 + s15 => s21; rule3_k*s14*s15*comp0;
  r50: s15 + s15 => s22; 0.5*rule3_k*s15*s15*comp0;
  r51: s15 => p_Grb2_SH2_SH3_1_p_Sos1_PxxP_1 + p_EGF_R_1_p_EGFR_CR1_L_1_Y1068_P; rule8_k*s15*comp0;
  r52: s15 => Sos1 + s14; rule10_k*s15*comp0;
  r53: s16 => s14 + p_EGF_R_1_p_EGFR_CR1_L_1_Y1068_P; rule4_k*s16*comp0;
  r54: s16 => s11; rule6_k*s16*comp0;
  r55: s16 + Grb2 => s20; rule7_k*s16*Grb2*comp0;
  r56: s16 + p_Grb2_SH2_SH3_1_p_Sos1_PxxP_1 => s21; rule7_k*s16*p_Grb2_SH2_SH3_1_p_Sos1_PxxP_1*comp0;
  r57: s16 => Grb2 + s10; rule8_k*s16*comp0;
  r58: s16 + Sos1 => s17; rule9_k*s16*Sos1*comp0;
  r59: s16 => Grb2; rule11_k*s16*comp0;
  r60: s17 => s15 + p_EGF_R_1_p_EGFR_CR1_L_1_Y1068_P; rule4_k*s17*comp0;
  r61: s17 => s12; rule6_k*s17*comp0;
  r62: s17 + Grb2 => s21; rule7_k*s17*Grb2*comp0;
  r63: s17 + p_Grb2_SH2_SH3_1_p_Sos1_PxxP_1 => s22; rule7_k*s17*p_Grb2_SH2_SH3_1_p_Sos1_PxxP_1*comp0;
  r64: s17 => s10 + p_Grb2_SH2_SH3_1_p_Sos1_PxxP_1; rule8_k*s17*comp0;
  r65: s17 => Sos1 + s16; rule10_k*s17*comp0;
  r66: s17 => p_Grb2_SH2_SH3_1_p_Sos1_PxxP_1; rule11_k*s17*comp0;
  r67: s18 + EGF => s14; rule1_k*s18*EGF*comp0;
  r68: s18 => Grb2 + p_EGFR_CR1_L_Y1068_P; rule8_k*s18*comp0;
  r69: s18 + Sos1 => s19; rule9_k*s18*Sos1*comp0;
  r70: s19 + EGF => s15; rule1_k*s19*EGF*comp0;
  r71: s19 => p_EGFR_CR1_L_Y1068_P + p_Grb2_SH2_SH3_1_p_Sos1_PxxP_1; rule8_k*s19*comp0;
  r72: s19 => Sos1 + s18; rule10_k*s19*comp0;
  r73: s20 => s14 + s14; rule4_k*s20*comp0;
  r74: s20 => Grb2 + s16; 2*rule8_k*s20*comp0;
  r75: s20 + Sos1 => s21; 2*rule9_k*s20*Sos1*comp0;
  r76: s20 => Grb2 + Grb2; rule11_k*s20*comp0;
  r77: s21 => s14 + s15; rule4_k*s21*comp0;
  r78: s21 => s16 + p_Grb2_SH2_SH3_1_p_Sos1_PxxP_1; rule8_k*s21*comp0;
  r79: s21 => Grb2 + s17; rule8_k*s21*comp0;
  r80: s21 + Sos1 => s22; rule9_k*s21*Sos1*comp0;
  r81: s21 => Sos1 + s20; rule10_k*s21*comp0;
  r82: s21 => Grb2 + p_Grb2_SH2_SH3_1_p_Sos1_PxxP_1; rule11_k*s21*comp0;
  r83: s22 => s15 + s15; rule4_k*s22*comp0;
  r84: s22 => s17 + p_Grb2_SH2_SH3_1_p_Sos1_PxxP_1; 2*rule8_k*s22*comp0;
  r85: s22 => Sos1 + s21; 2*rule10_k*s22*comp0;
  r86: s22 => p_Grb2_SH2_SH3_1_p_Sos1_PxxP_1 + p_Grb2_SH2_SH3_1_p_Sos1_PxxP_1; rule11_k*s22*comp0;
end
