// SBML level 2 version 4

model rtc2_counter()

  // Compartments:
  compartment Medium = 0.4;
  compartment Ecoli in Medium = 7e-16;

  // Species:
  species arab in Medium = 0; arab is "nb:i0003(arac)";
  species dna1 in Ecoli = 2.373042e-9; dna1 is "d:b0014*()-e0040*()-j01010*(rib~off)-r0085*(rnap)-b0014*()-i2032*(dna)-j01010*(rib~off)-j23100*()";
  species dna2 in Ecoli = 2.373042e-9; dna2 is "d:b0014*()-j01008*()-i0500*(arac1!1,arac2!2).p:c0080(arab,dim!3,dna!1).p:c0080(arab,dim!3,dna!2)";
  species nb_i0003_arac in Ecoli = 0; nb_i0003_arac is "nb:i0003(arac)";
  species r_j01010_rib_off_i2032_dna in Ecoli = 0; r_j01010_rib_off_i2032_dna is "r:j01010(rib~off)-i2032(dna)";
  species s6 in Ecoli = 0; s6 is "p:c0080(arab,dim!1,dna).p:c0080(arab,dim!1,dna)";
  species d_b0014_j01008_i0500_arac1_arac2 in Ecoli = 0; d_b0014_j01008_i0500_arac1_arac2 is "d:b0014*()-j01008*()-i0500*(arac1,arac2)";
  species s8 in Ecoli = 0; s8 is "nb:i0003(arac!1).p:c0080(arab!1,dim!2,dna).p:c0080(arab,dim!2,dna)";
  species p_c0080_arab_dim_dna in Ecoli = 0; p_c0080_arab_dim_dna is "p:c0080(arab,dim,dna)";
  species r_j01008 in Ecoli = 0; r_j01008 is "r:j01008()";
  species s11 in Ecoli = 0; s11 is "nb:i0003(arac!1).nb:i0003(arac!2).p:c0080(arab!1,dim!3,dna).p:c0080(arab!2,dim!3,dna)";
  species s12 in Ecoli = 0; s12 is "nb:i0003(arac!1).p:c0080(arab!1,dim,dna)";
  species r_j01010_rib_on_i2032_dna in Ecoli = 0; r_j01010_rib_on_i2032_dna is "r:j01010(rib~on)-i2032(dna)";
  species p_i2032_dna in Ecoli = 0; p_i2032_dna is "p:i2032(dna)";
  species s15 in Ecoli = 0; s15 is "d:b0014*()-e0040*()-j01010*(rib~off)-r0085*(rnap!1)-b0014*()-i2032*(dna)-j01010*(rib~off)-j23100*().p:i2032(dna!1)";
  species r_j01010_rib_off_e0040 in Ecoli = 0; r_j01010_rib_off_e0040 is "r:j01010(rib~off)-e0040()";
  species r_j01010_rib_on_e0040 in Ecoli = 0; r_j01010_rib_on_e0040 is "r:j01010(rib~on)-e0040()";
  species p_e0040 in Ecoli = 0; p_e0040 is "p:e0040()";

  // Parameters:
  NA = 6.02e23;
  f = 1;
  N = 1;
  pulse_conc = 0.001;
  pulse1_start = 2500.01;
  pulse2_start = 2561.01;
  arab_init = 0;
  transp2_pout = 0.2;
  transp2_pin = 0.2;
  rule11_k = 1.5;
  rule6_k = 0.01;
  rule19_k = 0.35;
  rule15_k = 0.0706;
  rule1_k = 100000000;
  rule4_k = 0.1;
  rule5_k = 71000000000;
  rule10_k = 0.1;
  rule2_k = 10;
  rule3_k = 1000000000;
  rule13_n = 1;
  rule13_Kp = 0.0009;
  rule13_kcat = 7.6;
  rule16_k = 0.167;
  rule12_k = 0.1;
  rule7_k = 2000000;
  rule17_k = 0.0056;
  rule8_k = 0.06;
  rule9_k = 0.5;
  rule14_k = 0.07;
  rule18_k = 0.0015;

  // Assignment rules:
  Ve := f*0.4;
  V := f*7e-16;
  dna1_init := 1/NA/V;
  dna2_init := 1/NA/V;
  time_ := time;

  // Reactions:
  r1: => arab; N*transp2_pout*nb_i0003_arac*Medium;  // modifiers: nb_i0003_arac
  r2: arab => ; N*transp2_pin*arab*Medium;
  r3: => nb_i0003_arac; transp2_pin*arab*Ecoli;  // modifiers: arab
  r4: nb_i0003_arac => ; transp2_pout*nb_i0003_arac*Ecoli;
  r5: => r_j01010_rib_off_i2032_dna; rule11_k*dna1*Ecoli;  // modifiers: dna1
  r6: dna2 => s6 + d_b0014_j01008_i0500_arac1_arac2; 2*rule6_k*dna2*Ecoli;
  r7: nb_i0003_arac => ; rule19_k*nb_i0003_arac*Ecoli;
  r8: r_j01010_rib_off_i2032_dna => ; rule15_k*r_j01010_rib_off_i2032_dna*Ecoli;
  r9: s6 + nb_i0003_arac => s8; rule1_k*s6*nb_i0003_arac*Ecoli;
  r10: s6 + nb_i0003_arac => s8; rule1_k*s6*nb_i0003_arac*Ecoli;
  r11: s6 => p_c0080_arab_dim_dna + p_c0080_arab_dim_dna; rule4_k*s6*Ecoli;
  r12: s6 + d_b0014_j01008_i0500_arac1_arac2 => dna2; rule5_k*s6*d_b0014_j01008_i0500_arac1_arac2*Ecoli;
  r13: => r_j01008; rule10_k*d_b0014_j01008_i0500_arac1_arac2*Ecoli;  // modifiers: d_b0014_j01008_i0500_arac1_arac2
  r14: s8 + nb_i0003_arac => s11; rule1_k*s8*nb_i0003_arac*Ecoli;
  r15: s8 => nb_i0003_arac + s6; rule2_k*s8*Ecoli;
  r16: s8 => s12 + p_c0080_arab_dim_dna; rule4_k*s8*Ecoli;
  r17: s8 => s6; rule19_k*s8*Ecoli;
  r18: p_c0080_arab_dim_dna + nb_i0003_arac => s12; rule1_k*p_c0080_arab_dim_dna*nb_i0003_arac*Ecoli;
  r19: p_c0080_arab_dim_dna + p_c0080_arab_dim_dna => s6; 0.5*rule3_k*p_c0080_arab_dim_dna*p_c0080_arab_dim_dna*Ecoli;
  r20: r_j01010_rib_off_i2032_dna => r_j01010_rib_on_i2032_dna; rule13_kcat*r_j01008*r_j01010_rib_off_i2032_dna^rule13_n/(rule13_Kp + r_j01010_rib_off_i2032_dna^rule13_n)*Ecoli;  // modifiers: r_j01008
  r21: r_j01008 => ; rule16_k*r_j01008*Ecoli;
  r22: s11 => nb_i0003_arac + s8; 2*rule2_k*s11*Ecoli;
  r23: s11 => s12 + s12; rule4_k*s11*Ecoli;
  r24: s11 => s8; 2*rule19_k*s11*Ecoli;
  r25: s12 => nb_i0003_arac + p_c0080_arab_dim_dna; rule2_k*s12*Ecoli;
  r26: p_c0080_arab_dim_dna + s12 => s8; rule3_k*p_c0080_arab_dim_dna*s12*Ecoli;
  r27: s12 + s12 => s11; 0.5*rule3_k*s12*s12*Ecoli;
  r28: s12 => p_c0080_arab_dim_dna; rule19_k*s12*Ecoli;
  r29: => p_i2032_dna; rule12_k*r_j01010_rib_on_i2032_dna*Ecoli;  // modifiers: r_j01010_rib_on_i2032_dna
  r30: r_j01010_rib_on_i2032_dna => ; rule15_k*r_j01010_rib_on_i2032_dna*Ecoli;
  r31: p_i2032_dna + dna1 => s15; rule7_k*p_i2032_dna*dna1*Ecoli;
  r32: p_i2032_dna => ; rule17_k*p_i2032_dna*Ecoli;
  r33: s15 => dna1 + p_i2032_dna; rule8_k*s15*Ecoli;
  r34: => r_j01010_rib_off_e0040; rule9_k*s15*Ecoli;  // modifiers: s15
  r35: => r_j01010_rib_off_i2032_dna; rule11_k*s15*Ecoli;  // modifiers: s15
  r36: s15 => dna1; rule17_k*s15*Ecoli;
  r37: r_j01010_rib_off_e0040 => r_j01010_rib_on_e0040; rule13_kcat*r_j01008*r_j01010_rib_off_e0040^rule13_n/(rule13_Kp + r_j01010_rib_off_e0040^rule13_n)*Ecoli;  // modifiers: r_j01008
  r38: r_j01010_rib_off_e0040 => ; rule14_k*r_j01010_rib_off_e0040*Ecoli;
  r39: => p_e0040; rule12_k*r_j01010_rib_on_e0040*Ecoli;  // modifiers: r_j01010_rib_on_e0040
  r40: r_j01010_rib_on_e0040 => ; rule14_k*r_j01010_rib_on_e0040*Ecoli;
  r41: p_e0040 => ; rule18_k*p_e0040*Ecoli;

  // Events:
  pulse1: at (time_ > pulse1_start): arab = pulse_conc;
  pulse2: at (time_ > pulse2_start): arab = pulse_conc;
end
