// SBML level 2 version 4

model toggle_switch()

  // Compartments:
  compartment Medium = 0.4;
  compartment Ecoli in Medium = 7e-16;

  // Species:
  species iptg in Medium = 0; iptg is "nb:i0001(laci)";
  species dna1 in Ecoli = 2.373042e-9; dna1 is "d:b0014*()-c0012*(dim,dna,iptg)-b0034*(rib)-r0040*(tetr1,tetr2)";
  species dna2 in Ecoli = 2.373042e-9; dna2 is "d:b0014*()-c0040*(atc,dim,dna)-b0034*(rib)-r0010*(laci1,laci2)";
  species nb_i0001_laci in Ecoli = 0; nb_i0001_laci is "nb:i0001(laci)";
  species r_b0034_rib_c0012_dim_dna_iptg in Ecoli = 0; r_b0034_rib_c0012_dim_dna_iptg is "r:b0034(rib)-c0012(dim,dna,iptg)";
  species r_b0034_rib_c0040_atc_dim_dna in Ecoli = 0; r_b0034_rib_c0040_atc_dim_dna is "r:b0034(rib)-c0040(atc,dim,dna)";
  species p_c0012_dim_dna_iptg in Ecoli = 0; p_c0012_dim_dna_iptg is "p:c0012(dim,dna,iptg)";
  species p_c0040_atc_dim_dna in Ecoli = 0; p_c0040_atc_dim_dna is "p:c0040(atc,dim,dna)";
  species s9 in Ecoli = 0; s9 is "nb:i0001(laci!1).p:c0012(dim,dna,iptg!1)";
  species s10 in Ecoli = 0; s10 is "p:c0012(dim!1,dna,iptg).p:c0012(dim!1,dna,iptg)";
  species s11 in Ecoli = 0; s11 is "p:c0040(atc,dim!1,dna).p:c0040(atc,dim!1,dna)";
  species s12 in Ecoli = 0; s12 is "nb:i0001(laci!1).p:c0012(dim!2,dna,iptg!1).p:c0012(dim!2,dna,iptg)";
  species s13 in Ecoli = 0; s13 is "nb:i0001(laci!1).nb:i0001(laci!2).p:c0012(dim!3,dna,iptg!1).p:c0012(dim!3,dna,iptg!2)";
  species s14 in Ecoli = 0; s14 is "d:b0014*()-c0040*(atc,dim,dna)-b0034*(rib)-r0010*(laci1!1,laci2!2).p:c0012(dim!3,dna!1,iptg).p:c0012(dim!3,dna!2,iptg)";
  species s15 in Ecoli = 0; s15 is "d:b0014*()-c0012*(dim,dna,iptg)-b0034*(rib)-r0040*(tetr1!1,tetr2!2).p:c0040(atc,dim!3,dna!1).p:c0040(atc,dim!3,dna!2)";

  // Parameters:
  NA = 6.02e23;
  f = 1;
  N = 1;
  iptg_init = 0;
  pulse1_start = 10000;
  pulse1_conc = 0.0001;
  transp0_pout = 0.1;
  transp0_pin = 0.1;
  rule15_k = 0.5;
  rule13_k = 0.5;
  rule17_k = 0.01155;
  rule18_k = 0.005783;
  rule19_k = 0.005783;
  rule7_k = 154000;
  rule9_k = 12500000;
  rule20_k = 0.00231;
  rule3_k = 17900000;
  rule21_k = 0.00231;
  rule8_k = 0.2;
  rule10_k = 10;
  rule11_k = 20000000000;
  rule4_k = 10;
  rule5_k = 100000000;
  rule12_k = 0.04;
  rule14_k = 0.0005;
  rule6_k = 0.01;
  rule16_k = 0.0005;

  // Assignment rules:
  Ve := f*0.4;
  V := f*7e-16;
  dna1_init := 1/NA/V;
  dna2_init := 1/NA/V;
  time_ := time;

  // Reactions:
  r1: => iptg; N*transp0_pout*nb_i0001_laci*Medium;  // modifiers: nb_i0001_laci
  r2: iptg => ; N*transp0_pin*iptg*Medium;
  r3: => nb_i0001_laci; transp0_pin*iptg*Ecoli;  // modifiers: iptg
  r4: nb_i0001_laci => ; transp0_pout*nb_i0001_laci*Ecoli;
  r5: => r_b0034_rib_c0012_dim_dna_iptg; rule15_k*dna1*Ecoli;  // modifiers: dna1
  r6: => r_b0034_rib_c0040_atc_dim_dna; rule13_k*dna2*Ecoli;  // modifiers: dna2
  r7: => p_c0012_dim_dna_iptg; rule17_k*r_b0034_rib_c0012_dim_dna_iptg*Ecoli;  // modifiers: r_b0034_rib_c0012_dim_dna_iptg
  r8: r_b0034_rib_c0012_dim_dna_iptg => ; rule18_k*r_b0034_rib_c0012_dim_dna_iptg*Ecoli;
  r9: => p_c0040_atc_dim_dna; rule17_k*r_b0034_rib_c0040_atc_dim_dna*Ecoli;  // modifiers: r_b0034_rib_c0040_atc_dim_dna
  r10: r_b0034_rib_c0040_atc_dim_dna => ; rule19_k*r_b0034_rib_c0040_atc_dim_dna*Ecoli;
  r11: p_c0012_dim_dna_iptg + nb_i0001_laci => s9; rule7_k*p_c0012_dim_dna_iptg*nb_i0001_laci*Ecoli;
  r12: p_c0012_dim_dna_iptg + p_c0012_dim_dna_iptg => s10; 0.5*rule9_k*p_c0012_dim_dna_iptg*p_c0012_dim_dna_iptg*Ecoli;
  r13: p_c0012_dim_dna_iptg => ; rule20_k*p_c0012_dim_dna_iptg*Ecoli;
  r14: p_c0040_atc_dim_dna + p_c0040_atc_dim_dna => s11; 0.5*rule3_k*p_c0040_atc_dim_dna*p_c0040_atc_dim_dna*Ecoli;
  r15: p_c0040_atc_dim_dna => ; rule21_k*p_c0040_atc_dim_dna*Ecoli;
  r16: s9 => nb_i0001_laci + p_c0012_dim_dna_iptg; rule8_k*s9*Ecoli;
  r17: p_c0012_dim_dna_iptg + s9 => s12; rule9_k*p_c0012_dim_dna_iptg*s9*Ecoli;
  r18: s9 + s9 => s13; 0.5*rule9_k*s9*s9*Ecoli;
  r19: s9 => nb_i0001_laci; rule20_k*s9*Ecoli;
  r20: s10 + nb_i0001_laci => s12; 2*rule7_k*s10*nb_i0001_laci*Ecoli;
  r21: s10 => p_c0012_dim_dna_iptg + p_c0012_dim_dna_iptg; rule10_k*s10*Ecoli;
  r22: s10 + dna2 => s14; rule11_k*s10*dna2*Ecoli;
  r23: s11 => p_c0040_atc_dim_dna + p_c0040_atc_dim_dna; rule4_k*s11*Ecoli;
  r24: s11 + dna1 => s15; rule5_k*s11*dna1*Ecoli;
  r25: s12 + nb_i0001_laci => s13; rule7_k*s12*nb_i0001_laci*Ecoli;
  r26: s12 => s10 + nb_i0001_laci; rule8_k*s12*Ecoli;
  r27: s12 => p_c0012_dim_dna_iptg + s9; rule10_k*s12*Ecoli;
  r28: s13 => s12 + nb_i0001_laci; 2*rule8_k*s13*Ecoli;
  r29: s13 => s9 + s9; rule10_k*s13*Ecoli;
  r30: s14 => dna2 + s10; 2*rule12_k*s14*Ecoli;
  r31: => r_b0034_rib_c0040_atc_dim_dna; rule14_k*s14*Ecoli;  // modifiers: s14
  r32: s15 => dna1 + s11; 2*rule6_k*s15*Ecoli;
  r33: => r_b0034_rib_c0012_dim_dna_iptg; rule16_k*s15*Ecoli;  // modifiers: s15

  // Events:
  pulse1: at (time_ > pulse1_start): iptg = pulse1_conc;
end
