// SBML level 2 version 4

model amitosis()

  // Compartments:
  compartment Medium = 0.4;
  compartment Ecoli in Medium = 7e-16;

  // Species:
  species theo in Medium = 0; theo is "nb:theo()";
  species dna1 in Ecoli = 2.373042e-9; dna1 is "d:plas(lasr1,lasr2)-rbs()-ci(dim,dna)-term()";
  species dna2 in Ecoli = 2.373042e-9; dna2 is "d:term*()-gfp*()-rbs*()-ci434*(dim,dna)-rbs*()-pr*(ci1,ci2)-prm(ci434_1,ci434_2)-rbs()-ci(dim,dna)-rbs()-rfp()-aptamer(rib~off)-chez()-rbs()-lasi()-rbs()-lasr(ahl,dim,dna)-term()";
  species nb_theo in Ecoli = 0; nb_theo is "nb:theo()";
  species r_rbs_ci_dim_dna in Ecoli = 0; r_rbs_ci_dim_dna is "r:rbs()-ci(dim,dna)";
  species r_rbs_ci434_dim_dna_rbs_gfp in Ecoli = 0; r_rbs_ci434_dim_dna_rbs_gfp is "r:rbs()-ci434(dim,dna)-rbs()-gfp()";
  species s7 in Ecoli = 0; s7 is "r:rbs()-ci(dim,dna)-rbs()-rfp()-aptamer(rib~off)-chez()-rbs()-lasi()-rbs()-lasr(ahl,dim,dna)";
  species p_ci_dim_dna in Ecoli = 0; p_ci_dim_dna is "p:ci(dim,dna)";
  species p_ci434_dim_dna in Ecoli = 0; p_ci434_dim_dna is "p:ci434(dim,dna)";
  species p_gfp in Ecoli = 0; p_gfp is "p:gfp()";
  species s11 in Ecoli = 0; s11 is "r:rbs()-ci(dim,dna)-rbs()-rfp()-aptamer(rib~on)-chez()-rbs()-lasi()-rbs()-lasr(ahl,dim,dna)";
  species p_rfp in Ecoli = 0; p_rfp is "p:rfp()";
  species p_lasi in Ecoli = 0; p_lasi is "p:lasi()";
  species p_lasr_ahl_dim_dna in Ecoli = 0; p_lasr_ahl_dim_dna is "p:lasr(ahl,dim,dna)";
  species p_ci_dim_1_dna_p_ci_dim_1_dna in Ecoli = 0; p_ci_dim_1_dna_p_ci_dim_1_dna is "p:ci(dim!1,dna).p:ci(dim!1,dna)";
  species s16 in Ecoli = 0; s16 is "p:ci434(dim!1,dna).p:ci434(dim!1,dna)";
  species p_chez in Ecoli = 0; p_chez is "p:chez()";
  species nb_ahl_lasr in Ecoli = 0; nb_ahl_lasr is "nb:ahl(lasr)";
  species s19 in Ecoli = 0; s19 is "p:lasr(ahl,dim!1,dna).p:lasr(ahl,dim!1,dna)";
  species s20 in Ecoli = 0; s20 is "d:term*()-gfp*()-rbs*()-ci434*(dim,dna)-rbs*()-pr*(ci1!1,ci2!2)-prm(ci434_1,ci434_2)-rbs()-ci(dim,dna)-rbs()-rfp()-aptamer(rib~off)-chez()-rbs()-lasi()-rbs()-lasr(ahl,dim,dna)-term().p:ci(dim!3,dna!1).p:ci(dim!3,dna!2)";
  species s21 in Ecoli = 0; s21 is "d:term*()-gfp*()-rbs*()-ci434*(dim,dna)-rbs*()-pr*(ci1,ci2)-prm(ci434_1!1,ci434_2!2)-rbs()-ci(dim,dna)-rbs()-rfp()-aptamer(rib~off)-chez()-rbs()-lasi()-rbs()-lasr(ahl,dim,dna)-term().p:ci434(dim!3,dna!1).p:ci434(dim!3,dna!2)";
  species s22 in Ecoli = 0; s22 is "nb:ahl(lasr!1).p:lasr(ahl!1,dim,dna)";
  species s23 in Ecoli = 0; s23 is "nb:ahl(lasr!1).p:lasr(ahl!1,dim!2,dna).p:lasr(ahl,dim!2,dna)";
  species s24 in Ecoli = 0; s24 is "d:term*()-gfp*()-rbs*()-ci434*(dim,dna)-rbs*()-pr*(ci1!1,ci2!2)-prm(ci434_1!3,ci434_2!4)-rbs()-ci(dim,dna)-rbs()-rfp()-aptamer(rib~off)-chez()-rbs()-lasi()-rbs()-lasr(ahl,dim,dna)-term().p:ci(dim!5,dna!1).p:ci(dim!5,dna!2).p:ci434(dim!6,dna!3).p:ci434(dim!6,dna!4)";
  species s25 in Ecoli = 0; s25 is "nb:ahl(lasr!1).nb:ahl(lasr!2).p:lasr(ahl!1,dim!3,dna).p:lasr(ahl!2,dim!3,dna)";
  species s26 in Ecoli = 0; s26 is "d:plas(lasr1!1,lasr2!2)-rbs()-ci(dim,dna)-term().nb:ahl(lasr!3).nb:ahl(lasr!4).p:lasr(ahl!3,dim!5,dna!1).p:lasr(ahl!4,dim!5,dna!2)";
  species s27 in Ecoli = 0; s27 is "d:plas(lasr1!1,lasr2!2)-rbs()-ci(dim,dna)-term().nb:ahl(lasr!3).p:lasr(ahl!3,dim!4,dna!2).p:lasr(ahl,dim!4,dna!1)";
  species s28 in Ecoli = 0; s28 is "d:plas(lasr1!1,lasr2!2)-rbs()-ci(dim,dna)-term().nb:ahl(lasr!3).p:lasr(ahl!3,dim!4,dna!1).p:lasr(ahl,dim!4,dna!2)";
  species s29 in Ecoli = 0; s29 is "d:plas(lasr1!1,lasr2!2)-rbs()-ci(dim,dna)-term().p:lasr(ahl,dim!3,dna!1).p:lasr(ahl,dim!3,dna!2)";

  // Parameters:
  NA = 6.02e23;
  f = 1;
  N = 1;
  theo_init = 0;
  pulse1_start = 10000;
  pulse1_conc = 0.0001;
  transp3_pout = 0.1;
  transp3_pin = 0.1;
  rule20_k = 0.0005;
  rule15_k = 0.5;
  rule17_k = 0.5;
  rule33_k = 0.35;
  rule23_k = 0.01155;
  rule25_k = 0.005783;
  rule21_Kp = 0.0009;
  rule21_n = 1;
  rule21_kcat = 7.6;
  rule5_k = 12500000;
  rule31_k = 0.00231;
  rule1_k = 17900000;
  rule32_k = 0.00231;
  rule26_k = 0.00231;
  rule24_k = 0.01155;
  rule27_k = 0.00231;
  rule22_k = 0.04;
  rule28_k = 0.00231;
  rule11_k = 12500000;
  rule29_k = 0.00231;
  rule6_k = 10;
  rule7_k = 20000000000;
  rule2_k = 10;
  rule3_k = 100000000;
  rule30_k = 0.00231;
  rule9_k = 154000;
  rule34_k = 0.35;
  rule12_k = 10;
  rule8_k = 0.04;
  rule16_k = 0.0005;
  rule4_k = 0.01;
  rule18_k = 0.0005;
  rule10_k = 0.2;
  rule13_k = 20000000000;
  rule14_k = 0.04;
  rule19_k = 0.5;

  // Assignment rules:
  Ve := f*0.4;
  V := f*7e-16;
  dna1_init := 1/NA/V;
  dna2_init := 1/NA/V;
  time_ := time;

  // Reactions:
  r1: => theo; N*transp3_pout*nb_theo*Medium;  // modifiers: nb_theo
  r2: theo => ; N*transp3_pin*theo*Medium;
  r3: => nb_theo; transp3_pin*theo*Ecoli;  // modifiers: theo
  r4: nb_theo => ; transp3_pout*nb_theo*Ecoli;
  r5: => r_rbs_ci_dim_dna; rule20_k*dna1*Ecoli;  // modifiers: dna1
  r6: => r_rbs_ci434_dim_dna_rbs_gfp; rule15_k*dna2*Ecoli;  // modifiers: dna2
  r7: => s7; rule17_k*dna2*Ecoli;  // modifiers: dna2
  r8: nb_theo => ; rule33_k*nb_theo*Ecoli;
  r9: => p_ci_dim_dna; rule23_k*r_rbs_ci_dim_dna*Ecoli;  // modifiers: r_rbs_ci_dim_dna
  r10: r_rbs_ci_dim_dna => ; rule25_k*r_rbs_ci_dim_dna*Ecoli;
  r11: => p_ci434_dim_dna; rule23_k*r_rbs_ci434_dim_dna_rbs_gfp*Ecoli;  // modifiers: r_rbs_ci434_dim_dna_rbs_gfp
  r12: => p_gfp; rule23_k*r_rbs_ci434_dim_dna_rbs_gfp*Ecoli;  // modifiers: r_rbs_ci434_dim_dna_rbs_gfp
  r13: r_rbs_ci434_dim_dna_rbs_gfp => ; rule25_k*r_rbs_ci434_dim_dna_rbs_gfp*Ecoli;
  r14: s7 => s11; rule21_kcat*nb_theo*s7^rule21_n/(rule21_Kp + s7^rule21_n)*Ecoli;  // modifiers: nb_theo
  r15: => p_ci_dim_dna; rule23_k*s7*Ecoli;  // modifiers: s7
  r16: => p_rfp; rule23_k*s7*Ecoli;  // modifiers: s7
  r17: => p_lasi; rule23_k*s7*Ecoli;  // modifiers: s7
  r18: => p_lasr_ahl_dim_dna; rule23_k*s7*Ecoli;  // modifiers: s7
  r19: s7 => ; rule25_k*s7*Ecoli;
  r20: p_ci_dim_dna + p_ci_dim_dna => p_ci_dim_1_dna_p_ci_dim_1_dna; 0.5*rule5_k*p_ci_dim_dna*p_ci_dim_dna*Ecoli;
  r21: p_ci_dim_dna => ; rule31_k*p_ci_dim_dna*Ecoli;
  r22: p_ci434_dim_dna + p_ci434_dim_dna => s16; 0.5*rule1_k*p_ci434_dim_dna*p_ci434_dim_dna*Ecoli;
  r23: p_ci434_dim_dna => ; rule32_k*p_ci434_dim_dna*Ecoli;
  r24: p_gfp => ; rule26_k*p_gfp*Ecoli;
  r25: => p_ci_dim_dna; rule23_k*s11*Ecoli;  // modifiers: s11
  r26: => p_rfp; rule23_k*s11*Ecoli;  // modifiers: s11
  r27: => p_lasi; rule23_k*s11*Ecoli;  // modifiers: s11
  r28: => p_lasr_ahl_dim_dna; rule23_k*s11*Ecoli;  // modifiers: s11
  r29: => p_chez; rule24_k*s11*Ecoli;  // modifiers: s11
  r30: s11 => ; rule25_k*s11*Ecoli;
  r31: p_rfp => ; rule27_k*p_rfp*Ecoli;
  r32: => nb_ahl_lasr; rule22_k*p_lasi*Ecoli;  // modifiers: p_lasi
  r33: p_lasi => ; rule28_k*p_lasi*Ecoli;
  r34: p_lasr_ahl_dim_dna + p_lasr_ahl_dim_dna => s19; 0.5*rule11_k*p_lasr_ahl_dim_dna*p_lasr_ahl_dim_dna*Ecoli;
  r35: p_lasr_ahl_dim_dna => ; rule29_k*p_lasr_ahl_dim_dna*Ecoli;
  r36: p_ci_dim_1_dna_p_ci_dim_1_dna => p_ci_dim_dna + p_ci_dim_dna; rule6_k*p_ci_dim_1_dna_p_ci_dim_1_dna*Ecoli;
  r37: p_ci_dim_1_dna_p_ci_dim_1_dna + dna2 => s20; rule7_k*p_ci_dim_1_dna_p_ci_dim_1_dna*dna2*Ecoli;
  r38: s16 => p_ci434_dim_dna + p_ci434_dim_dna; rule2_k*s16*Ecoli;
  r39: s16 + dna2 => s21; rule3_k*s16*dna2*Ecoli;
  r40: p_chez => ; rule30_k*p_chez*Ecoli;
  r41: p_lasr_ahl_dim_dna + nb_ahl_lasr => s22; rule9_k*p_lasr_ahl_dim_dna*nb_ahl_lasr*Ecoli;
  r42: nb_ahl_lasr => ; rule34_k*nb_ahl_lasr*Ecoli;
  r43: s19 + nb_ahl_lasr => s23; 2*rule9_k*s19*nb_ahl_lasr*Ecoli;
  r44: s19 => p_lasr_ahl_dim_dna + p_lasr_ahl_dim_dna; rule12_k*s19*Ecoli;
  r45: s16 + s20 => s24; rule3_k*s16*s20*Ecoli;
  r46: s20 => dna2 + p_ci_dim_1_dna_p_ci_dim_1_dna; 2*rule8_k*s20*Ecoli;
  r47: => r_rbs_ci434_dim_dna_rbs_gfp; rule16_k*s20*Ecoli;  // modifiers: s20
  r48: => s7; rule17_k*s20*Ecoli;  // modifiers: s20
  r49: s21 => dna2 + s16; 2*rule4_k*s21*Ecoli;
  r50: p_ci_dim_1_dna_p_ci_dim_1_dna + s21 => s24; rule7_k*p_ci_dim_1_dna_p_ci_dim_1_dna*s21*Ecoli;
  r51: => r_rbs_ci434_dim_dna_rbs_gfp; rule15_k*s21*Ecoli;  // modifiers: s21
  r52: => s7; rule18_k*s21*Ecoli;  // modifiers: s21
  r53: s22 => p_lasr_ahl_dim_dna + nb_ahl_lasr; rule10_k*s22*Ecoli;
  r54: p_lasr_ahl_dim_dna + s22 => s23; rule11_k*p_lasr_ahl_dim_dna*s22*Ecoli;
  r55: s22 + s22 => s25; 0.5*rule11_k*s22*s22*Ecoli;
  r56: s22 => nb_ahl_lasr; rule29_k*s22*Ecoli;
  r57: s22 => p_lasr_ahl_dim_dna; rule34_k*s22*Ecoli;
  r58: s23 + nb_ahl_lasr => s25; rule9_k*s23*nb_ahl_lasr*Ecoli;
  r59: s23 => nb_ahl_lasr + s19; rule10_k*s23*Ecoli;
  r60: s23 => p_lasr_ahl_dim_dna + s22; rule12_k*s23*Ecoli;
  r61: s23 => s19; rule34_k*s23*Ecoli;
  r62: s24 => s16 + s20; 2*rule4_k*s24*Ecoli;
  r63: s24 => p_ci_dim_1_dna_p_ci_dim_1_dna + s21; 2*rule8_k*s24*Ecoli;
  r64: => r_rbs_ci434_dim_dna_rbs_gfp; rule16_k*s24*Ecoli;  // modifiers: s24
  r65: => s7; rule18_k*s24*Ecoli;  // modifiers: s24
  r66: s25 => nb_ahl_lasr + s23; 2*rule10_k*s25*Ecoli;
  r67: s25 => s22 + s22; rule12_k*s25*Ecoli;
  r68: s25 + dna1 => s26; rule13_k*s25*dna1*Ecoli;
  r69: s25 => s23; 2*rule34_k*s25*Ecoli;
  r70: s26 => dna1 + s25; 2*rule14_k*s26*Ecoli;
  r71: => r_rbs_ci_dim_dna; rule19_k*s26*Ecoli;  // modifiers: s26
  r72: s26 => s27; rule34_k*s26*Ecoli;
  r73: s26 => s28; rule34_k*s26*Ecoli;
  r74: => r_rbs_ci_dim_dna; rule19_k*s27*Ecoli;  // modifiers: s27
  r75: s27 => s29; rule34_k*s27*Ecoli;
  r76: => r_rbs_ci_dim_dna; rule19_k*s28*Ecoli;  // modifiers: s28
  r77: s28 => s29; rule34_k*s28*Ecoli;
  r78: => r_rbs_ci_dim_dna; rule19_k*s29*Ecoli;  // modifiers: s29

  // Events:
  pulse1: at (time_ > pulse1_start): theo = pulse1_conc;
end
